# 1. Перехідна характеристика
H(n) :=
    if n < 0
        0
    if n ≥ 0
        1
# [plot: H(n) vs n]
n := -1, -0.99 .. 1
k := 1
T := 0.5
ρ := -0.05
solve block
    # constraints
    T^2*y''(t) + 2*ρ*T*y'(t) + y(t) == k*H(t)
    y(0) == 0
    y'(0) == 0
    # solver
    y := odesolve(y(t), 45)
end solve block
ρ := 1
solve block
    # constraints
    T^2*y2''(t) + 2*ρ*T*y2'(t) + y2(t) == k*H(t)
    y2(0) == 0
    y2'(0) == 0
    # solver
    y2 := odesolve(y2(t), 45)
end solve block
ρ := 0.05
solve block
    # constraints
    T^2*y3''(t) + 2*ρ*T*y3'(t) + y3(t) == k*H(t)
    y3(0) == 0
    y3'(0) == 0
    # solver
    y3 := odesolve(y3(t), 45)
end solve block
# [plot: y(x), y2(x), y3(x) vs x]
# 2. Імпульсна характеристика
δ(x) :=
    if x ≠ 0
        0
    if x == 0
        1000
# [plot: δ(n) vs n]
ρ := -0.05
solve block
    # constraints
    T^2*y''(t) + 2*ρ*T*y'(t) + y(t) == δ(t)
    y(0) == 1000
    y'(0) == 0
    # solver
    y := odesolve(y(t), 25)
end solve block
ρ := 1
solve block
    # constraints
    T^2*y2''(t) + 2*ρ*T*y2'(t) + y2(t) == δ(t)
    y2(0) == 1000
    y2'(0) == 0
    # solver
    y2 := odesolve(y2(t), 25)
end solve block
ρ := 0.05
solve block
    # constraints
    T^2*y3''(t) + 2*ρ*T*y3'(t) + y3(t) == δ(t)
    y3(0) == 1000
    y3'(0) == 0
    # solver
    y3 := odesolve(y3(t), 25)
end solve block
# [plot: y(x), y2(x), y3(x) vs x]
ρ := -0.05
solve block
    # constraints
    T^2*y''(t) + 2*ρ*T*y'(t) + y(t) == sin(t)
    y(0) == 1000
    y'(0) == 0
    # solver
    y := odesolve(y(t), 25)
end solve block
ρ := 1
solve block
    # constraints
    T^2*y2''(t) + 2*ρ*T*y2'(t) + y2(t) == sin(t)
    y2(0) == 1000
    y2'(0) == 0
    # solver
    y2 := odesolve(y2(t), 25)
end solve block
ρ := 0.05
solve block
    # constraints
    T^2*y3''(t) + 2*ρ*T*y3'(t) + y3(t) == sin(t)
    y3(0) == 1000
    y3'(0) == 0
    # solver
    y3 := odesolve(y3(t), 25)
end solve block
max := 4096
t := 0 .. max - 1
z[t] := y(t*10/max)
t := 0 .. 2048
f := Re(fft(z))
F[t] := |f[t]|
t := 0 .. max - 1
z2[t] := y2(t*10/max)
t := 0 .. 2048
f2 := Re(fft(z2))
F2[t] := |f2[t]|
t := 0 .. max - 1
z3[t] := y3(t*10/max)
t := 0 .. 2048
f3 := Re(fft(z3))
F3[t] := |f3[t]|
# [plot: F[t] vs t]
# [plot: F2[t] vs t]
# [plot: F3[t] vs t]
