# Вхідні параметри
# T - стала часу ладки
# ro - коефіцієнт затухання
# k - коефіцієнт підсилення
# а) Перехідна характеристика
H(n) :=
    if n < 0
        0
    if n ≥ 0
        1
# Вхідний сигнал - одиничний стрибок(Функція Хевісайда)
n := -1, -0.99 .. 1
# [plot: H(n) vs n]
k := 1
T := 0.5
ro := -0.01
solve block
    # constraints
    T^2*y''(t) + 2*ro*T*y'(t) + y(t) == k*H(t)
    y(0) == 0
    y'(0) == 0
    # solver
    y := odesolve(y(t), 30)
end solve block
ro := 0
solve block
    # constraints
    T^2*y2''(t) + 2*ro*T*y2'(t) + y2(t) == k*H(t)
    y2(0) == 0
    y2'(0) == 0
    # solver
    y2 := odesolve(y2(t), 30)
end solve block
ro := 0.01
solve block
    # constraints
    T^2*y3''(t) + 2*ro*T*y3'(t) + y3(t) == k*H(t)
    y3(0) == 0
    y3'(0) == 0
    # solver
    y3 := odesolve(y3(t), 30)
end solve block
# Зображення перехідної характеристики для трьох різних коефіцієнтів затухання
# [plot: y(x), y2(x), y3(x) vs x]
# б)Імпульсна характеристика
δ(x) :=
    if x ≠ 0
        0
    if x == 0
        100
# Вхідний сигнал - одиничний імпульс (Функція Дірака)
# [plot: δ(n) vs n]
ro := -0.01
solve block
    # constraints
    T^2*y''(t) + 2*ro*T*y'(t) + y(t) == δ(t)
    y(0) == 1000
    y'(0) == 0
    # solver
    y := odesolve(y(t), 30)
end solve block
ro := 0
solve block
    # constraints
    T^2*y2''(t) + 2*ro*T*y2'(t) + y2(t) == δ(t)
    y2(0) == 1000
    y2'(0) == 0
    # solver
    y2 := odesolve(y2(t), 30)
end solve block
ro := 0.01
solve block
    # constraints
    T^2*y3''(t) + 2*ro*T*y3'(t) + y3(t) == δ(t)
    y3(0) == 1000
    y3'(0) == 0
    # solver
    y3 := odesolve(y3(t), 30)
end solve block
# Зображення імпульсної характеристики для трьох різних коефіцієнтів затухання
# [plot: y(x), y2(x), y3(x) vs x]
# в) Частотна характеристика
ro := -0.01
solve block
    # constraints
    T^2*y''(t) + 2*ro*T*y'(t) + y(t) == cos(t)
    y(0) == 1000
    y'(0) == 0
    # solver
    y := odesolve(y(t), 30)
end solve block
ro := 0
solve block
    # constraints
    T^2*y2''(t) + 2*ro*T*y2'(t) + y2(t) == cos(t)
    y2(0) == 1000
    y2'(0) == 0
    # solver
    y2 := odesolve(y2(t), 30)
end solve block
ro := 0.01
solve block
    # constraints
    T^2*y3''(t) + 2*ro*T*y3'(t) + y3(t) == cos(t)
    y3(0) == 1000
    y3'(0) == 0
    # solver
    y3 := odesolve(y3(t), 30)
end solve block
# Зображення реакції на гармонічний сигнал для трьох різних коефіцієнтів затухання
# [plot: y(x), y2(x), y3(x) vs x]
max := 8192
t := 0 .. max - 1
z[t] := y(t*30/max)
f := Re(fft(z))
t := 0 .. 4096
F[t] := |f[t]|
t := 0 .. max - 1
z2[t] := y2(t*30/max)
f2 := Re(fft(z2))
t := 0 .. 4096
F2[t] := |f2[t]|
t := 0 .. max - 1
z3[t] := y3(t*5/max)
f3 := Re(fft(z3))
t := 0 .. 4096
F3[t] := |f3[t]|
# Зображення частотної характеристики для трьох різних коефіцієнтів затухання
# [plot: F[t], F2[t], F3[t] vs t]
