# Вхідні параметри
# k - коефіцієнт підсилення
# а) Перехідна характеристика
H(n) :=
    if n < 0
        0
    if n ≥ 0
        1
# Вхідний сигнал - одиничний стрибок(Функція Хевісайда)
k1 := 1
solve block
    # constraints
    y'(t) == k1*H(t)
    y(0) == 1
    # solver
    y := odesolve(y(t), 10)
end solve block
k2 := 5
solve block
    # constraints
    y2'(t) == k2*H(t)
    y2(0) == 1
    # solver
    y2 := odesolve(y2(t), 10)
end solve block
k3 := 10
solve block
    # constraints
    y3'(t) == k3*H(t)
    y3(0) == 1
    # solver
    y3 := odesolve(y3(t), 10)
end solve block
# [plot: y(x), y2(x), y3(x) vs x]
# б)Імпульсна характеристика
δ(x) :=
    if x ≠ 0
        0
    if x == 0
        100
# Вхідний сигнал - одиничний імпульс (Функція Дірака)
g(t, k) := k*H(t)
# [plot: g(t, k1), g(t, k2), g(t, k3) vs t]
# в) Частотна характеристика
A(w, k) := k/(w*1i)
# Зображення частотної характеристики для трьох різних коефіцієнтів
# [plot: |A(w, k1)|, |A(w, k2)|, |A(w, k3)| vs w]
