# Вхідні параметри
# T - стала часу ланки
# k - коефіцієнт підсилення
# а) Перехідна характеристика
H(n) :=
    if n < 0
        0
    if n ≥ 0
        1
# Вхідний сигнал - одиничний стрибок(Функція Хевісайда)
n := -1, -0.99 .. 1
k := 1
T := 3
solve block
    # constraints
    T*y'(t) + y(t) == k*H(t)
    y(0) == 0
    # solver
    y := odesolve(y(t), 10)
end solve block
k := 2.9
solve block
    # constraints
    T*y2'(t) + y2(t) == k*H(t)
    y2(0) == 0
    # solver
    y2 := odesolve(y2(t), 10)
end solve block
k := 7
solve block
    # constraints
    T*y3'(t) + y3(t) == k*H(t)
    y3(0) == 0
    # solver
    y3 := odesolve(y3(t), 10)
end solve block
# Зображення перехідної характеристики
# [plot: y(x), y2(x), y3(x) vs x]
# б)Імпульсна характеристика
T := 3
k1 := 1
k2 := 2.9
k3 := 7
g(t, k) := k/T*e^(-t/T)
# [plot: g(t, k1), g(t, k2), g(t, k3) vs t]
# в) Частотна характеристика
T := 3
k1 := 1
k2 := 2.9
k3 := 7
A(w, k) := k/(T*w*1i + 1)
# Зображення частотної характеристики
# [plot: |A(w, k1)|, |A(w, k2)|, |A(w, k3)| vs w]
