k1 := 1
k2 := 9.988
k3 := 25
T := 5
# 1. Перехідна характеристика
H(t) :=
    if t < 0
        0
    if t ≥ 0
        1
# [plot: H(n) vs n]
n := -1, -0.99 .. 1
h(t, k, T) := k/T*exp(-t/T)*H(t)
# [plot: h(t, k1, T), h(t, k2, T), h(t, k3, T) vs t]
# 2. Імпульсна характеристика
δ(x) :=
    if x ≠ 0
        0
    if x == 0
        1000
# [plot: δ(n) vs n]
del(t, k, T) := k/T*δ(t) - k/T^2*exp(-t/T)*H(t)
# [plot: del(t, k1, T), del(t, k2, T), del(t, k3, T) vs t]
A(w, k, T) := k*w/sqrt(1 + 1i*w^2*T^2)
# [plot: |A(w, k1, T)|, |A(w, k2, T)|, |A(w, k3, T)| vs w]
