# Вхідні параметри
# T - стала часу ланки
# k - коефіцієнт підсилення
# а) Перехідна характеристика
T := 2
k1 := 0.99
k2 := 8.99
k3 := 16.99
H(n) :=
    if n < 0
        0
    else
        1
# Вхідний сигнал - одиничний стрибок(Функція Хевісайда)
n := -1, -0.99 .. 1
h(t, k, T) := k/T*exp(-t/T)*H(t)
# Зображення перехідної характеристики
# [plot: h(t, k1, T), h(t, k2, T), h(t, k3, T) vs t]
# б)Імпульсна характеристика
δ(x) :=
    if x ≠ 0
        0
    if x == 0
        1000
# Вхідний сигнал - одиничний імпульс (Функція Дірака)
del(t, k, T) := k/T*δ(t) - k/T^2*exp(-t/T)*H(t)
# [plot: del(t, k1, T), del(t, k2, T), del(t, k3, T) vs t]
# в) Частотна характеристика
A(w, k, T) := k*w/sqrt(1 + 1i*w^2*T^2)
# Зображення частотної характеристики
# [plot: |A(w, k1, T)|, |A(w, k2, T)|, |A(w, k3, T)| vs w]
