T0 := 0.02
fs := 5/T0
f(x) := cos(2*π*x/T0)
N0 := 512
k := 0 .. N0 - 1
n[k] := k/fs
v[k] := f(n[k])
h := 1/(4*fs)
ti := 0, h .. 20
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spec := fft(v)
p := 0 .. N0/2
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specRev := ifft(spec)
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