T0 := 0.02
fs := 5/T0
# annotation to a formula above: Using Fourier transforms.
f(x) := cos(2*π*x/T0) + cos(π*x/(2*T0)) + sin(π*x/T0)
N0 := 512
k := 0 .. N0 - 1
n[k] := k/fs
v[k] := f(n[k])
h := 1/(4*fs)
ti := 0, h .. 20
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spec := fft(v)
p := 0 .. N0/2
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specRev := ifft(spec)
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# Square signal
T1 := 0.2
tau := T1/2
fs := 60/T1
n[k] := k/fs
h := 1/(4*fs)
t := 0, h .. 10
fp(t) :=
    1 if 0 ≤ mod(t, T1) ≤ tau
    -1 otherwise
v[k] := fp(n[k])
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spec := fft(v)
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specRev := ifft(spec)
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# Triangle signal
tau := T1
fs := 20/T1
n[k] := k/fs
h := 1/(4*fs)
t := 0, h .. 10
fpt(t) :=
    2*mod(t + tau/2, T1)/tau if -tau/2 ≤ mod(t + tau/2, T1) - tau/2 ≤ 0
    -2*(mod(t, T1) + (-tau/2))/tau if 0 ≤ mod(t, T1) ≤ tau/2
    0 otherwise
v[k] := fpt(n[k])
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spec := fft(v)
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specRev := ifft(spec)
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