fileName := ".\image.bmp"
outputRelef := ".\kontrolna_relef.bmp"
outputTysnennya := ".\kontrolna_tysnennya.bmp"
outputReize := ".\kontrolna_resize.bmp"
outputInverse := ".\kontrolna_inverse.bmp"
input := READRGB(fileName)
cols := cols(input) = 3648
rows := rows(input) = 852
imginverse(input_gray, rows, cols) :=
    output[0, 0] ← 0
    for i ∈ 0 .. rows - 1
        for j ∈ 0 .. cols/3 - 1
            input[i, j + cols/3 - 1] ← (255 - input[i, cols/3 - 1 + j])
    input
output := imginverse(input, rows, cols)
WRITERGB(outputInverse, output) = 0
input_gray := READ_IMAGE(fileName)
cols := cols(input_gray) = 1216
rows := rows(input_gray) = 852
N := 5
res_col := cols*N
res_row := rows
rez_x := rows/res_row
rez_y := cols/res_col
imgresize(input_gray, rez_x, rez_y, res_col, res_row, N) :=
    output[0, 0] ← 0
    for i ∈ 0 .. res_row - 1
        for j ∈ 0 .. res_col - 1
            new_x ← floor(i*1)
            new_y ← floor(j*rez_y)
            output[i, j] ← input_gray[new_x, new_y]
    output
output := imgresize(input_gray, rez_x, rez_y, res_col, res_row, N)
WRITEBMP(outputReize, output) = 0
input_gray := READ_IMAGE(fileName)
cols := cols(input_gray) = 1216
rows := rows(input_gray) = 852
H := [-2, -1, 0; -1, 1, 1; 0, 1, 2]
m := rows(H) = 3
n := cols(H) = 3
zhortka(input_gray, rows, cols, m, n, H) :=
    output[0, 0] ← 0
    for i ∈ m - 1 .. rows - m - 1
        for j ∈ n - 1 .. cols - n - 1
            sum ← 0
            for s ∈ 0 .. m - 1
                for t ∈ 0 .. n - 1
                    sum ← sum + H[s, t]*input_gray[i - s, j - t]
            output[i, j] ← floor(sum)
    output
output := zhortka(input_gray, rows, cols, m, n, H)
WRITEBMP(outputRelef, output) = 0
H := [0, 1, 0; -1, 0, 1; 0, -1, 0]
m := rows(H) = 3
n := cols(H) = 3
output := zhortka(input_gray, rows, cols, m, n, H)
WRITEBMP(outputTysnennya, output) = 0
