matrix1 := READ_IMAGE("image1.bmp")
# [component: inputs matrix1]
matrix1 =  # no stored result
matrix2 := READRGB("image1.bmp")
# [component: inputs extract(matrix2)]
tresh1 := 32
binear_image_1 := binarize(matrix1, tresh1)
# [component: inputs scale(binear_image_1, 0, 255)]
binear_image_2 := binarize2(matrix1, 15, 120, 50, 240)
# [component: inputs binear_image_2]
levels := 6
quant_matr_1 := imquant(matrix1, levels)
# [component: inputs quant_matr_1]
v := [50; 101; 233]
quant_matr_2 := imquant2(matrix1, v)
# [component: inputs quant_matr_2]
4
Matr := [
    0, 20, 40, 100, 80;
    13, 27, 54, 152, 184;
    134, 148, 152, 169, 187;
    255, 247, 232, 113, 234;
    146, 168, 185, 218, 255
]
n := 4
# [component: inputs Matr]
imquant(Matr, n) = [
    0, 0, 0, 85, 85;
    0, 0, 85, 170, 170;
    170, 170, 170, 170, 170;
    255, 255, 255, 85, 255;
    170, 170, 170, 255, 255
]
Matr_q := imquant(Matr, n)
# [component: inputs Matr_q]
