READ_IMAGE
Text := READ_IMAGE("text.bmp")
# [component: inputs Text]
H := rows(Text) - 1
W := cols(Text) - 1
m
C :=
    p ← 0
    C[p] ← 0
    for m ∈ 0 .. H
        for n ∈ 0 .. W
            if Text[H - m, n] == 0
                p ← p + 1
                C[p] ← n + 1i*(m - (H + 1)/2)
    C
r := 1 .. rows(C) - 1
m := 0 .. H
n := 0 .. W
rd(x) := floor(x + .5)
s := .5
f(z) := z + s*Im(z)
T1 := vectorize(f(C))
U1[H, W] := 0
U1[rd((H + 1)/2 - Im(T1[r])), rd(Re(T1[r]))] := 255  # error: This array index is invalid for this array.
# [component: inputs 255 - U1]
