# Зчитування з файлу кольорового зображення
matrix := READRGB("image1.bmp")
# [component: inputs extract(matrix)]
matrix =  # no stored result
# Перетворення кольорового зображення в зображення в градаціх сірого
# Формула : color.r * 0.299 + color.g * 0.587 + color.b * 0.114;
gr_sc_r := 0.299
gr_sc_g := 0.587
gr_sc_b := 0.114
m := rows(matrix) = 60
n := cols(matrix) = 240
k := cols(matrix)/3 = 80
a := 0 .. m - 1
b := 0 .. k - 1
GrayScale[a, b] :=
    for i ∈ 0 .. m - 1
        z ← 0
        while (z < n)
            GrayScale ← matrix[i, z]*gr_sc_r + matrix[i, z + 1]*gr_sc_g + matrix[i, z + 2]*gr_sc_b
            z ← z + 3
    GrayScale[□]  # error: This placeholder is empty.
GrayScale =  # error: This variable is undefined.
