fileName := ".\test_median.bmp"
outputFileName := ".\test_median_2.bmp"
input := READ_IMAGE(fileName)
output := input
cols := cols(input) = 234
rows := rows(input) = 218
output := 0
N := 3
median(input, N, rows, cols) :=
    output[0, 0] ← 0
    for i ∈ N .. rows - N - 1
        for j ∈ N .. cols - N - 1
            s ← 0
            mask[0] ← 0
            for p ∈ 0 .. N - 1
                for l ∈ 0 .. N - 1
                    mask[s] ← input[i + p - N, j + l - N]
                    s ← s + 1
            sorted ← sort(mask)
            output[i, j] ← sorted[4]
    output
output := median(input, N, rows, cols)
output := median(input, N, rows, cols)
output := median(input, N, rows, cols)
WRITEBMP(outputFileName, output) = 0
