fileName := ".\test_image.bmp"
outputFile := ".\test_result_gray_filter.bmp"
input_gray := READ_IMAGE(fileName)
cols := cols(input_gray) = 819
rows := rows(input_gray) = 460
H := [-2, -1, 0; -1, 1, 1; 0, 1, 2] = [-2, -1, 0; -1, 1, 1; 0, 1, 2]
m := rows(H) = 3
n := cols(H) = 3
zhortka(input_gray, rows, cols, m, n, H) :=
    output[0, 0] ← 0
    for i ∈ m - 1 .. rows - m - 1
        for j ∈ n - 1 .. cols - n - 1
            sum ← 0
            for s ∈ 0 .. m - 1
                for t ∈ 0 .. n - 1
                    sum ← sum + H[s, t]*input_gray[i - s, j - t]
            output[i, j] ← floor(sum)
    output
output := zhortka(input_gray, rows, cols, m, n, H)
WRITEBMP(outputFile, output) = 0
