outputResizeBoth := ".\test_result_resize_both.bmp"
outputResizeWidth := ".\test_result_resize_width.bmp"
outputResizeHeight := ".\test_result_resize_height.bmp"
fileName := ".\test_image.bmp"
input_gray := READ_IMAGE(fileName)
cols := cols(input_gray) = 819
rows := rows(input_gray) = 460
N := 1/3
res_col := cols*N
res_row := rows*N
rez_x := rows/res_row
rez_y := cols/res_col
imgresize(input_gray, rez_x, rez_y, res_col, res_row, N) :=
    output[0, 0] ← 0
    for i ∈ 0 .. res_row - 1
        for j ∈ 0 .. res_col - 1
            new_x ← floor(i*rez_x)
            new_y ← floor(j*rez_y)
            output[i, j] ← input_gray[new_x, new_y]
    output
output := imgresize(input_gray, rez_x, rez_y, res_col, res_row, N)
WRITEBMP(outputResizeBoth, output) = 0
