outputBinerializeMore := ".\test_result_binerialize_more.bmp"
fileName := ".\test_image.bmp"
input_gray := READ_IMAGE(fileName)
cols := cols(input_gray) = 819
rows := rows(input_gray) = 460
N := 10
imgbinerializemore(input_gray, cols, rows) :=
    output[0, 0] ← 0
    for i ∈ 0 .. rows - 1
        for j ∈ 0 .. cols - 1
            if (input_gray[i, j] > 230)
                output[i, j] ← 210
            else if (input_gray[i, j] > 200)
                output[i, j] ← 180
            else if (input_gray[i, j] > 170)
                output[i, j] ← 150
            else if (input_gray[i, j] > 130)
                output[i, j] ← 120
            else if (input_gray[i, j] > 100)
                output[i, j] ← 90
            else if (input_gray[i, j] > 60)
                output[i, j] ← 60
            else if (input_gray[i, j] > 30)
                output[i, j] ← 30
            else
                output[i, j] ← 0
    output
output := imgbinerializemore(input_gray, cols, rows)
WRITEBMP(outputBinerializeMore, output) = 0
