outputBinerializeOne := ".\test_result_binerialize1.bmp"
fileName := ".\test_image.bmp"
input_gray := READ_IMAGE(fileName)
cols := cols(input_gray) = 819
rows := rows(input_gray) = 460
imgbinerialize(input_gray, cols, rows) :=
    output[0, 0] ← 0
    for i ∈ 0 .. rows - 1
        for j ∈ 0 .. cols - 1
            if (input_gray[i, j] > 127)
                output[i, j] ← 1
            else
                output[i, j] ← 0
    output
output := imgbinerialize(input_gray, cols, rows)
WRITEBMP(outputBinerializeOne, output) = 0
