outputFlipping := ".\test_result_flipping.bmp"
fileName := ".\test_image.bmp"
input_gray := READ_IMAGE(fileName)
cols := cols(input_gray) = 819
rows := rows(input_gray) = 460
strength := 2
imgflipping(input_gray, cols, rows, strength) :=
    output[0, 0] ← 0
    if (strength == 1)
        k ← cols - 1
        for i ∈ 0 .. cols - 1
            for j ∈ 0 .. rows - 1
                output[j, k] ← input_gray[j, i]
            k ← k - 1
    if (strength == 2)
        k ← rows - 1
        for i ∈ 0 .. rows - 1
            for j ∈ 0 .. cols - 1
                output[k, j] ← input_gray[i, j]
            k ← k - 1
    output
output := imgflipping(input_gray, cols, rows, strength)
WRITEBMP(outputFlipping, output) = 0
