fileName := ".\test_image.bmp"
outputGrayscale := ".\test_result_grayscale.bmp"
input := READRGB(fileName)
cols := cols(input) = 2457
rows := rows(input) = 460
new_cols := cols(input)/3 = 819
grayscale(input, rows, cols) :=
    output[0, 0] ← 0
    for i ∈ 0 .. rows - 1
        for j ∈ 0 .. cols/3 - 1
            sum ← (input[i, j]*0.2989 + input[i, cols/3 + j]*0.5870 + input[i, 2*cols/3 + j]*0.1140)
            output[i, j] ← sum
    output
output := grayscale(input, rows, cols)
cols(output) = 819
WRITEBMP(outputGrayscale, output) = 0
