fileName := ".\test_median.bmp"
input := READBMP(fileName)
rows := rows(input) = 218
cols := cols(input) = 234
getHystogram(input, rows, cols) :=
    hystoX[0] ← 0
    for i ∈ 0 .. 254
        hystoX[i] ← i
    output[0, 0] ← 0
    for k ∈ 0 .. length(hystoX) - 1
        pixel ← hystoX[k]
        count ← 0
        for i ∈ 0 .. rows - 1
            for j ∈ 0 .. cols - 1
                if input[i, j] == pixel
                    count ← count + 1
        output[k, 0] ← pixel
        output[k, 1] ← count
    output
hystogramData := getHystogram(input, rows, cols)
# [plot: hystogramData[:, 1] vs hystogramData[:, 0]]
