fileName := ".\test_image.bmp"
outputGrayInverse := ".\test_result_grayinvrse.bmp"
input := READRGB(fileName)
cols := cols(input) = 2457
outputColorInverse := ".\test_result_colorinverse.bmp"
rows := rows(input) = 460
input_gray := READ_IMAGE(fileName)
cols_g := cols(input_gray) = 819
rows_g := rows(input_gray) = 460
imginverse(input_gray, rows, cols) :=
    output[0, 0] ← 0
    for i ∈ 0 .. rows - 1
        for j ∈ 0 .. cols - 1
            output[i, j] ← 255 - input_gray[i, j]
    output
output := imginverse(input_gray, rows_g, cols_g)
WRITEBMP(outputGrayInverse, output) = 0
output := imginverse(input, rows, cols)
WRITERGB(outputColorInverse, output) = 0
