fileName1 := ".\test_image.bmp"
fileName2 := ".\test_result_colorinverse.bmp"
resultedOverlay := ".\test_image_overlayed.bmp"
bmp1 := READBMP(fileName1)
bmp2 := READBMP(fileName2)
rows := rows(bmp1) = 460
cols := cols(bmp1) = 819
imageoverlayed(im1, im2, rows, cols) :=
    output[0, 0] ← 0
    for i ∈ 0 .. rows - 1
        for j ∈ 0 .. cols - 1
            output[i, j] ← (im1[i, j] + im2[i, j]) - (im1[i, j]*im2[i, j])/255
    output
output := imageoverlayed(bmp1, bmp2, rows, cols)
WRITEBMP(resultedOverlay, output) = 0
