outputRotation := ".\test_result_rotation.bmp"
fileName := ".\image1.bmp"
input_gray := READ_IMAGE(fileName)
cols := cols(input_gray) = 80
rows := rows(input_gray) = 60
fi := 45*(π/180)
imgresize(input_gray, cols, rows, fi) :=
    output[0, 0] ← 0
    for i ∈ 0 .. rows - 1
        for j ∈ 0 .. cols - 1
            rt ← i - rows/2
            ct ← j - cols/2
            new_r ← round(rt*cos(fi) + ct*sin(fi))
            new_c ← round(rt*sin(fi) + ct*cos(fi))
            if ((new_r ≥ 0) and (new_r < rows) and (new_c ≥ 0) and (new_c < cols))
                output[i, j] ← input_gray[new_r, new_c]
    output
output := imgresize(input_gray, cols, rows, fi)
WRITEBMP(outputRotation, output) = 0
