filename := "bukva_y2.wav"
[NumChannels; SampleRate; Resolution; AvgBytesPerSecond] := GETWAVINFO(filename)
Resolution = 16
SampleRate = 44100
WavData := READWAV(filename)
WavData =  # no stored result
n := 0 .. length(WavData) - 1
time[n] := n/SampleRate
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ss := length(WavData) - 1
ss = 4453
w(n, i, ss) := if(i + n ≤ ss, i + n, i + n - ss)
Norm := sum(WavData[i]*WavData[i], i = 0 .. ss)
Norm = 99299427380
Cor(WavData, n) := sum(WavData[i]*WavData[w(n, i, ss)], i = 0 .. ss)/Norm
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