filename := "bukva_y2.wav"
[NumChannels; SampleRate; Resolution; AvgBytesPerSecond] := GETWAVINFO(filename)
Resolution = 16
SampleRate = 44100
WavData := READWAV(filename)
WavData =  # no stored result
n := 0 .. length(WavData) - 1
time[n] := n/SampleRate
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ss := 2^8
i := 0 .. ss - 1
overlap := 10 %
ti := floor(length(WavData)/(ss*(1 - overlap)))
j := 0 .. ti - ceil(1/(1 - overlap))
count := ti - ceil(1/(1 - overlap)) = 17
slice[i, j] := WavData[i + j*floor(ss*(1 - overlap))]
Hm(n, N) := (.54 - .46*cos(2*π*n/(N - 1)))
# annotation to a formula above: Accessing WAV files with Mathcad.
w[i] := Hm(i, ss)
wslice[:, j] := vectorize(slice[:, j]*w)
dB(x) := 20*log(x)
spectra[:, j] := vectorize(dB(|fft(wslice[:, j])|^2 + .0001))
p := 0 .. ss/2
spectra[:, j] := dB(|fft(wslice[:, j])|)
spec[p] := sum(spectra[p, k], k = 0 .. count)/count
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por := 3
i := 0 .. por - 1
FF := [365; 911; 2917]
BF := [60; 34; 72]
AF := [100; 50; 80]
Fd := SampleRate
Fd = 44100
FOT := 181
f := FF/Fd
f = [0.00827664; 0.0206576; 0.0661451]
b := BF/Fd
b = [0.00136054; 0.000770975; 0.00163265]
k[i, 0] := (-2*e^(-π*b[i])*cos(2*π*f[i]))
k[i, 1] := e^(-2*π*b[i])
k[i, 0] = [-1.98878; -1.97838; -1.82039]
k[i, 1] = [0.991488; 0.995168; 0.989794]
T := 1/FOT
T = 0.00552486
f_imp(x, win) :=
    1 if (x/T) - floor(x/T) < win
    0 otherwise
leng := 10000
p := 0 .. leng
temp[p] := p/Fd
x[p] := f_imp(temp[p], 0.4)
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d := 2 .. leng
yI[p] := 0
yII[p] := 0
yIII[n] := 0
yI[d] := AF[0]*x[d] - k[0, 0]*yI[d - 1] - k[0, 1]*yI[d - 2]
yII[d] := AF[1]*x[d] - k[1, 0]*yII[d - 1] - k[1, 1]*yII[d - 2]
yIII[d] := AF[2]*x[d] - k[2, 0]*yIII[d - 1] - k[2, 1]*yIII[d - 2]
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y[p] := yI[p] + yII[p] + yIII[p]
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Spec_yI := cfft(yI)
Spec_yII := cfft(yII)
Spec_yIII := cfft(yIII)
Spec_y := cfft(y)
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SR := 44100
Rez := 16
WRITEWAV("E:\Віруся\Навчання\!!Цифрова обробка інформації\Labs\Zvukovi_syhnaly\for_zvit\resulted_y2.wav", SR, Rez) := y
