filename := "experimental.wav"
[NumChannels; SampleRate; Resolution; AvgBytesPerSecond] := GETWAVINFO(filename)
Resolution = 16
NumChannels = 2
AvgBytesPerSecond = 32000
SampleRate = 8000
WavData := READWAV(filename)
n := 0 .. length(WavData[:, 0]) - 1
WavData =  # no stored result
time[n] := n/SampleRate
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ss := 2^8
i := 0 .. ss - 1
overlap := 10 %
ti := floor(length(WavData[:, 0])/(ss*(1 - overlap)))
j := 0 .. ti - ceil(1/(1 - overlap))
slice[i, j] := WavData[:, 0][i + j*floor(ss*(1 - overlap))]
Hm(n, N) := (.54 - .46*cos(2*π*n/(N - 1)))
# annotation to a formula above: Accessing WAV files with Mathcad.
w[i] := Hm(i, ss)
wslice[:, j] := vectorize(slice[:, j]*w)
dB(x) := 20*log(x)
spectra[:, j] := vectorize(dB(|fft(wslice[:, j])|^2 + .0001))
# [component: inputs transpose(spectra)]
# [component: inputs transpose(spectra)]
order := 8
f_low := .15
f_high := 35
D := iirpass(butter(order/2), f_low, f_high)  # error: This value must be between 0 and 0.5.
WavData[:, 0]
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D =  # error: This variable is undefined.
