filename := "experimental1.wav"
[NumChannels; SampleRate; Resolution; AvgBytesPerSecond] := GETWAVINFO(filename)
Resolution = 16
NumChannels = 1
AvgBytesPerSecond = 16000
SampleRate = 8000
WavData := READWAV(filename)
n := 0 .. length(WavData) - 1
time[n] := n/SampleRate
WavData =  # no stored result
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ss := 2^8
i := 0 .. ss - 1
overlap := 10 %
ti := floor(length(WavData)/(ss*(1 - overlap)))
j := 0 .. ti - ceil(1/(1 - overlap))
count := ti - ceil(1/(1 - overlap)) = 10
slice[i, j] := WavData[i + j*floor(ss*(1 - overlap))]
Hm(n, N) := (.54 - .46*cos(2*π*n/(N - 1)))
# annotation to a formula above: Accessing WAV files with Mathcad.
w[i] := Hm(i, ss)
wslice[:, j] := vectorize(slice[:, j]*w)
dB(x) := 20*log(x)
spectra[:, j] := vectorize(dB(|fft(wslice[:, j])|^2 + .0001))
# [component: inputs transpose(spectra)]
p := 0 .. ss/2
spectra[:, j] := dB(|fft(wslice[:, j])|)
spec[p] := sum(spectra[p, k], k = 0 .. count)/count
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