# butter(N) | bessel(N, scale) | cheby1(N, ε) | cheby2(N, scale, atten)
# iirlow(C, f) | iirhigh(C, f)
# iirpass(C, lowf, highf) | iirstop(C, lowf, highf)
N := 8
ε := .5
f := .25
A := iirlow(cheby1(N, ε), f)
A = [
    0.430774, 1, 0.376071, 1, 0.207861, 1, 0.0497443, 1;
    0.861548, -0.00497802, 0.752142, -0.286355, 0.415723, -0.801346, 0.0994886, -1.30217;
    0.430774, 0.931457, 0.376071, 0.790639, 0.207861, 0.632791, 0.0497443, 0.501151
]
ripple := 1/sqrt(1 + ε^2)
x := 0, .001 .. .5
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order := 8
f_low := .15
f_high := .35
D := iirpass(butter(order/2), f_low, f_high)
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D = [
    0.253302, 1, 0.183903, 1;
    0, 0, 0, 0;
    -0.506603, 0.45312, -0.367806, 0.328976;
    0, 0, 0, 0;
    0.253302, 0.466326, 0.183903, 0.0645877
]
