order := 8
f_low := .15
f_high := .35
D := iirpass(butter(4), f_low, f_high)
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D = [
    0.253302, 1, 0.183903, 1;
    0, 0, 0, 0;
    -0.506603, 0.45312, -0.367806, 0.328976;
    0, 0, 0, 0;
    0.253302, 0.466326, 0.183903, 0.0645877
]
