filename := "experimental1.wav"
[NumChannels; SampleRate; Resolution; AvgBytesPerSecond] := GETWAVINFO(filename)
Resolution = 16
NumChannels = 1
AvgBytesPerSecond = 16000
SampleRate = 8000
Td := 1/SampleRate
WavData := READWAV(filename)
a10 := 0.758874
b10 := 1.000000
a11 := -1.517750
b11 := -1.479670
a12 := 0.758874
b12 := 0.555822
a20 := 0.872366
b20 := 1.000000
a21 := -1.744730
b21 := -1.700960
a22 := 0.872366
b22 := 0.788500
k := 2 .. length(WavData) - 1
y[0] := 0
y[1] := 0
y1[0] := 0
y1[1] := 0
y[k] := a10*WavData[k] + a11*WavData[k - 1] + a12*WavData[k - 2] - b11*y[k - 1] - b12*y[k - 2]
y1[k] := a20*y[k] + a21*y[k - 1] + a22*y[k - 2] - b21*y1[k - 1] - b22*y1[k - 2]
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ss := 2^8
i := 0 .. ss - 1
overlap := 10 %
ti := floor(length(y1)/(ss*(1 - overlap)))
j := 0 .. ti - ceil(1/(1 - overlap))
slice[i, j] := y1[i + j*floor(ss*(1 - overlap))]
Hm(n, N) := (.54 - .46*cos(2*π*n/(N - 1)))
# annotation to a formula above: Accessing WAV files with Mathcad.
w[i] := Hm(i, ss)
wslice[:, j] := vectorize(slice[:, j]*w)
dB(x) := 20*log(x)
spectra[:, j] := vectorize(dB(|fft(wslice[:, j])|^2 + .0001))
# [component: inputs transpose(spectra)]
p := 0 .. ss/2
spectra[:, j] := dB(|fft(wslice[:, j])|)
count := ti - ceil(1/(1 - overlap)) = 10
spec[p] := sum(spectra[p, k], k = 0 .. count)/count
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CH1(f) := |(a10*e^(2*1i*2*π*f*Td) + (a11*e)^(1i*(2*π*f)*Td) + a12)/(b12*e^(-2*imag(2*π*f)*Td) + b11*e^(1i*(2*π*f)*Td) + b10)*(a20*e^(2*1i*2*π*f*Td) + (a21*e)^(1i*(2*π*f)*Td) + a22)/(b22*e^(2*1i*(2*π*f)*Td) + b21*e^(1i*(2*π*f)*Td) + b20)|  # error: This value must be a function, but has the form: Unitless.
