filename := "experimental1.wav"
[NumChannels; SampleRate; Resolution; AvgBytesPerSecond] := GETWAVINFO(filename)
Resolution = 16
NumChannels = 1
AvgBytesPerSecond = 16000
SampleRate = 8000
Td := 1/SampleRate
WavData := READWAV(filename)
a10 := 0.010684
b10 := 1.000000
a11 := 0.000000
b11 := -3.583890
a12 := -0.021369
b12 := 4.828150
a13 := 0.000000
b13 := -2.898850
a14 := 0.010684
b14 := 0.654789
a20 := 0.011886
b20 := 1.000000
a21 := 0.000000
b21 := -3.763810
a22 := -0.023772
b22 := 5.371240
a23 := 0.000000
b23 := -3.448140
a24 := 0.011886
b24 := 0.840925
k := 4 .. length(WavData) - 1
y[0] := 0
y[1] := 0
y[2] := 0
y[3] := 0
y1[0] := 0
y1[1] := 0
y1[2] := 0
y1[3] := 0
y[k] := a10*WavData[k] + a11*WavData[k - 1] + a12*WavData[k - 2] + a13*WavData[k - 3] + a14*WavData[k - 4] - b11*y[k - 1] - b12*y[k - 2] - b13*y[k - 3] - b14*y[k - 4]
y1[k] := a20*y[k] + a21*y[k - 1] + a22*y[k - 2] + a23*y[k - 3] + a24*y[k - 4] - b21*y1[k - 1] - b22*y1[k - 2] - b23*y1[k - 3] - b24*y1[k - 4]
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ss := 2^8
i := 0 .. ss - 1
overlap := 10 %
ti := floor(length(y1)/(ss*(1 - overlap)))
j := 0 .. ti - ceil(1/(1 - overlap))
slice[i, j] := y1[i + j*floor(ss*(1 - overlap))]
Hm(n, N) := (.54 - .46*cos(2*π*n/(N - 1)))
# annotation to a formula above: Accessing WAV files with Mathcad.
w[i] := Hm(i, ss)
wslice[:, j] := vectorize(slice[:, j]*w)
dB(x) := 20*log(x)
spectra[:, j] := vectorize(dB(|fft(wslice[:, j])|^2 + .0001))
# [component: inputs transpose(spectra)]
p := 0 .. ss/2
spectra[:, j] := dB(|fft(wslice[:, j])|)
count := ti - ceil(1/(1 - overlap)) = 10
spec[p] := sum(spectra[p, k], k = 0 .. count)/count
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CH1(f) := |(a10*e^(2*1i*2*π*f*Td) + (a11*e)^(1i*(2*π*f)*Td) + a12)/(b12*e^(-2*imag(2*π*f)*Td) + b11*e^(1i*(2*π*f)*Td) + b10)*(a20*e^(2*1i*2*π*f*Td) + (a21*e)^(1i*(2*π*f)*Td) + a22)/(b22*e^(2*1i*(2*π*f)*Td) + b21*e^(1i*(2*π*f)*Td) + b20)|  # error: This value must be a function, but has the form: Unitless.
