filename := "Sten.wav"
# annotation to a formula above: Accessing WAV files with Mathcad.
[NumChannels; SampleRate; Resolution; AvgBytesPerSecond] := GETWAVINFO(filename)
NumChannels = 2
Resolution = 16
SampleRate = 44100
AvgBytesPerSecond = 176400
WavDataTwoChanels := READWAV(filename)
WavData := WavDataTwoChanels[:, 1]
dataLenght := length(WavData) = 13715
n := 0 .. length(WavData) - 1
time[n] := n/SampleRate
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ss := 512
i := 0 .. ss - 1
overlap := 40 %
ti := floor(length(WavData)/(ss*(1 - overlap)))
j := 0 .. ti - ceil(1/(1 - overlap))
len := ti - ceil(1/(1 - overlap)) = 42
slice[i, j] := WavData[i + j*floor(ss*(1 - overlap))]
Hm(n, N) := (.54 - .46*cos(2*π*n/(N - 1)))
w[i] := Hm(i, ss)
wslice[:, j] := vectorize(slice[:, j]*w)
dB(x) := 20*log(x)
spectra[:, j] := vectorize(dB(|fft(wslice[:, j])|^2 + .0001))
# [component: inputs transpose(spectra)]
p := 0 .. ss/2
spectra[:, j] := dB(|fft(wslice[:, j])|)
spec[p] := sum(spectra[p, k], k = 0 .. len)/len
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