T0 := 1
N0 := 512
fd := 100
f(x) := 2*cos(2*π*x*230/(2*T0)) + 2*sin(2*π*x*80/(1.5*T0))
k := 0 .. N0 - 1
n[k] := k/fd
v[k] := f(n[k])
aa[k] := v[k] - floor(v[k])
ti := 0, 0.05 .. 20
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Spec := fft(v)
p := 0 .. N0/2
c[p] := 1/sqrt(N0)*sum(v[k]*e^(1i*(2*π*p/N0)*k), k)
length(Spec) = 257
Spec2 := FFT(v)
Specaa := fft(aa)
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