T0 := 0.01
f(x) := cos(2*π*x*230) + sin(2*π*x*80)
N0 := 512
fs := 10/T0
k := 0 .. N0 - 1
n[k] := k/fs
# annotation to a formula above: Using Fourier transforms.
v[k] := f(n[k])
h := 1/(4*fs)
ti := 0, h .. 20
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spec := fft(v)
p := 0 .. N0/2
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specRev := ifft(spec)
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T1 := 0.05
tau := 2*T1/6 = 0.0166667
fs := 60/T1
n[k] := k/fs
h := 1/(4*fs)
t := 0, h .. 10
fp(t) :=
    1 if 0 ≤ mod(t, T1) ≤ tau
    -1 otherwise
v[k] := fp(n[k])
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spec := fft(v)
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specRev := ifft(spec)
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tau := T1
fs := 30/T1
n[k] := k/fs
h := 1/(4*fs)
t := 0, h .. 10
fpt(t) :=
    2*mod(t + tau/2, T1)/tau if -tau/2 ≤ mod(t + tau/2, T1) - tau/2 ≤ 0
    -2*(mod(t, T1) + (-tau/2))/tau if 0 ≤ mod(t, T1) ≤ tau/2
    0 otherwise
v[k] := fpt(n[k])
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spec := fft(v)
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specRev := ifft(spec)
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T0 := 0.01
f(x) := cos(2*π*x*230) + sin(2*π*x*80) + rnd(1)
N0 := 512
fs := 10/T0
k := 0 .. N0 - 1
n[k] := k/fs
v[k] := f(n[k])
h := 1/(4*fs)
ti := 0, h .. 20
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spec := fft(v)
p := 0 .. N0/2
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specRev := ifft(spec)
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