f(x) := cos(2*π*x*230) + sin(2*π*x*80) + rnd(3)
n := 0 .. 127
fd := 2000
d[n] := f(1/fd*n)
m1 := 0 .. 64
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D1 := cfft(d)
DF := fft(d)
s1[m1] := |m1 - 50| ≤ 30
DW[n] := if(|n - 64| < 55, 0, D1[n])
length(DF) = 65
dw := icfft(DW)
DW1[m1] := (1 - s1[m1])*DF[m1]
dw1 := ifft(DW1)
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p := 0 .. 64
Spec := cfft(dw)
Spec1 := cfft(dw1)
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