# Worksheet setting: ORIGIN = -2
fk := 80
fs := 230
Td := 0.001
delta := 0.001
fn := 1/(2*delta) = 500
fi := π*fs/fn = 1.44513
fi1 := π*fk/fn = 0.502655
r := 1.01
zn := cos(fi) + sin(fi)*1i
zp := r*cos(fi) + r*sin(fi)*1i
mn := (1 + (1 + 2*Re(zp))/(r*r))/(2 + 2*Re(zn)) = 0.990143
b1 := -2*Re(zn) = -0.250666
a1 := -(2*Re(zp))/(r*r) = -0.248185
a2 := 1/(r*r) = 0.980296
H(f) := |(1*e^(-2*1i*2*π*f*Td) + (-1.753*e^(-1i*(2*π*f)*Td)) + 1)*mn/(0.98*e^(-2*1i*(2*π*f)*Td) + (-1.735*e^(-1i*(2*π*f)*Td)) + 1)|
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f(x) := 2*cos(2*π*x*230) + cos(2*π*x*80)
fd := 1000
N0 := 512
k := 0 .. N0 - 3
n[k] := k/fd
v[k] := f(n[k])
ti := 0, 0.0005 .. 10
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Spec := fft(v)
p := 0 .. N0/2
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y[-1] := 0
y[-2] := 0
y[k] := 0.99*(v[k] + b1*v[k - 1] + v[k - 2]) - a1*y[k - 1] - a2*y[k - 2]
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Spec1 := cfft(y)
p := 0 .. 256
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